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/batch
! ANSYS input file written by Workbench version 2022 R2
! File used for geometry attach: C:\Users\alexn\Downloads\MEE 488 -Mech Engineering Design I\MEE 488 Concept V2 ANSYS\Impact Anvil 2.2.STEP
/title,MEE488 1.4 Impact--Static Structural (D5)
/COM,/COM,     ANSYSMotion, 2022.2
/com,--- Data in consistent BIN units. See Solving Units in the help system for more information.
/units,BIN
/prep7
! Turn off shape checking because checks already performed inside WB mesher.
! See help system for more information.
SHPP,OFF,,NOWARN
etcon,set             ! allow ANSYS to choose best KEYOP's for 180x elements, resets any applicable keyopt to MAPDL defaults
/com,*********** Nodes for the whole assembly ***********
nblock,3,,10717
(1i9,3e20.9e3)
        1    -1.629447814E-16     4.918440820E+00     9.736646884E-02
        2     4.592425497E-17     3.758203431E+00     7.500000000E-01
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-1
/com,*********** Elements for Body 1 "Impact Weight|Cut-Extrude1" ***********
et,1,187
eblock,19,solid,,4530
(19i9)
        1        1        1        1        0        0        0        0       10        0      633     1287     2002     2681     2376     2784     6561     2787     2786
     6558     8595
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-1
/com,*********** Elements for Body 2 "Impact Nose|Cut-Extrude2" ***********
et,2,187
eblock,19,solid,,632
(19i9)
        2        2        2        2        0        0        0        0       10        0        1      199      212      224      215     1198     1254     1202     1200
     1249     1260
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-1
/com,*********** Send User Defined Coordinate System(s) ***********
csys,0
toffst,459.67,  ! Temperature offset from absolute zero
/com,*********** Set Reference Temperature ***********
tref,71.6
/com,*********** Send Materials ***********
Temperature = 'TEMP' ! Temperature
MP,DENS,1,0.000734544492879577,	! slinch in^-3
MP,ALPX,1,6.66666666666667e-06,	! F^-1
MP,C,1,373722.969668162,	! in^2 s^-2 F^-1
MP,KXX,1,7.55607836445752,	! slinch in s^-3 F^-1
MP,RSVX,1,8.52348993288591,	! ohm cmil in^-1
MP,EX,1,29007547.5428236,	! slinch s^-2 in^-1
MP,NUXY,1,0.3,
MP,MURX,1,10000,

Temperature = 'TEMP' ! Temperature
MP,DENS,2,0.000734544492879577,	! slinch in^-3
MP,ALPX,2,6.66666666666667e-06,	! F^-1
MP,C,2,373722.969668162,	! in^2 s^-2 F^-1
MP,KXX,2,7.55607836445752,	! slinch in s^-3 F^-1
MP,RSVX,2,8.52348993288591,	! ohm cmil in^-1
MP,EX,2,29007547.5428236,	! slinch s^-2 in^-1
MP,NUXY,2,0.3,
MP,MURX,2,10000,

!************************* Model Summary ********************
!Impact Weight|Cut-Extrude1,	Structural Steel,	matid,	1
!Impact Nose|Cut-Extrude2,	Structural Steel,	matid,	2
!************************* End Model Summary ********************
/com,*********** Create Contact "Contact Region" ***********
*set,tid,4
*set,cid,3
r,tid
r,cid
et,tid,170
et,cid,174
eblock,10,,,42
(15i9)
     7765        4        4        4        0     1515     1516     2347     2347     4067     4076     2347     4070
     7766        4        4        4        0     1533     2354     1534     1534     4150     4154     1534     4146
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-1
eblock,10,,,42
(15i9)
     7807        3        3        3        0     1515     1516     2347     2347     4067     4076     2347     4070
     7808        3        3        3        0     1533     2354     1534     1534     4150     4154     1534     4146
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-1
eblock,10,,,42
(15i9)
     7849        3        4        3        0      180      182      181      181     1114     1121      181     1113
     7850        3        4        3        0      180      183      182      182     1115     1127      182     1114
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-1
eblock,10,,,42
(15i9)
     7891        4        3        4        0      180      182      181      181     1114     1121      181     1113
     7892        4        3        4        0      180      183      182      182     1115     1127      182     1114
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-1
keyo,cid,8,2               ! auto create asymmetric contact (from Program Controlled setting)
keyo,cid,10,0              ! adjust contact stiffness each NR iteration (from Program Controlled setting)
keyo,cid,12,5              ! bonded always
keyo,cid,18,1              ! small sliding turned on by application
keyo,cid,2,0               ! augmented Lagrange (from Program Controlled setting)
keyo,cid,4,0               ! on Gauss point (from Program Controlled setting)
keyo,cid,9,1               ! ignore initial gaps/penetration
keyo,cid,7,0               ! No Prediction
rmod,tid,3,10.      ! FKN
rmod,tid,5,0.       ! ICONT
rmod,tid,6,0.       ! PINB
rmod,tid,10,0.      ! CNOF
rmod,tid,12,0.      ! FKT
rmod,tid,36,29      ! WB DSID
rmod,cid,3,10.      ! FKN
rmod,cid,5,0.       ! ICONT
rmod,cid,6,0.       ! PINB
rmod,cid,10,0.      ! CNOF
rmod,cid,12,0.      ! FKT
rmod,cid,36,29      ! WB DSID
nsel,all
esel,all
/com,*********** Fixed Supports ***********
CMBLOCK,_FIXEDSU,NODE,      113
(8i10)
      1265      1266      1267      1268      1269      1270      1271      1272
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cmsel,s,_FIXEDSU
d,all,all
nsel,all
/com,*********** Define Force Using Surface Effect Elements ***********
local,12,0,0.,0.,0.,0.,0.,0.
csys,0
et,5,154
eblock,10,,,4
(15i9)
     7933        5        5        5       12        1       44       17       17      227      301       17      226
     7934        5        5        5       12       44       43       45       45      426      427       45      429
     7935        5        5        5       12       45       16       17       17      298      296       17      302
     7936        5        5        5       12       44       45       17       17      429      302       17      301
-1
esel,s,type,,5
keyop,5,2,1                ! Apply load in local coordinate system
keyop,5,7,1                ! Use original area so load is constant in large deformation
esel,all
fini
/com,****************************************************************************
/com,*************************    SOLUTION       ********************************
/com,****************************************************************************
/solu
antype,0                   ! static analysis
_thickRatio=  1     ! Ratio of thick parts in the model
eqsl,pcg,1e-8,,,,,,1
cntr,print,1               ! print out contact info and also make no initial contact an error
dmpoption,emat,no             ! Don't combine emat file for DANSYS
dmpoption,esav,no             ! Don't combine esav file for DANSYS
nldiag,cont,iter           ! print out contact info each equilibrium iteration
rescontrol,,none                 ! Do not keep any restart files
/com,****************************************************
/com,******************* SOLVE FOR LS 1 OF 1 ****************
esel,s,type,,5
nsle
sfe,all,1,pres,1,4.73773792422954e-013
sfe,all,2,pres,1,-28892.9499242488
sfe,all,3,pres,1,0.
nsel,all
esel,all
nsub,1,1,1
time,1.
outres,erase
outres,all,none
outres,nsol,all,
outres,rsol,all
outres,eangl,all
outres,etmp,all
outres,veng,all
outres,strs,all,
outres,epel,all,
outres,eppl,all,
outres,cont,all,
! *********** WB SOLVE COMMAND ***********
! check interactive state
*get,ANSINTER_,active,,int
*if,ANSINTER_,ne,0,then
/eof
*endif
solve
/com *************** Write FE CONNECTORS *********
CEWRITE,file,ce,,INTE
/com,****************************************************
/com,*************** FINISHED SOLVE FOR LS 1 *************
*get,_NSOLTHREADS,active,0,ntfs
*get,_NSOLPROCESSES,active,0,npfs
*get,_PCGITER,active,,solu,cgiter
/post1
fini
